<?xml version="1.0"?>
<!--
  Short Empire flying boat flight model for JSBSim.

  Copyright (C) 2009 - 2010  Anders Gidenstam  (anders(at)gidenstam.org)
  This file is licensed under the GPL license version 2 or later.
-->
<propeller name="deHavilland5000">

 <documentation>
   Propeller data from [Cassidy:2004:FE]:
   - Two pitch settings: FINE and COARSE
   - in FINE pitch for take-off - 13 280 lb. thrust total at 20 knots
   - "The airscrews fitted initially to all the 'boats were de Havilland 5000
      series 2 position variable pitch units of 12 ft. 9 ins. diameter with a
      pitch of approximately 14 ft (4.63 m.). ... each weighing 365 lb. ..."
 </documentation>
 <documentation>
   JavaProp:
     Designed for 172 knots (maximum speed in level flight)
     at 920 HP and 2600 (engine) RPM at coarse pitch (1.0).
     Fine pitch (0.0) is design pitch -8 deg (a guess).

     #blades 3
     n          1300 RPM
     D          3.8862 m
     Spinner D  0.30 m
     Velocity   88.484444 m/s
     Power      686043.88 W
     Weight     365 lb

   Airfoil
     Clark Y, Re=500000
     Clark Y, Re=500000
     Clark Y, Re=500000
     Flat plate, Re=500000
 </documentation>
 <documentation>
   The intertia is assumed to be
     n * 1/3*m_b*(d^2)/4
   where
     n is the number of blades,
     m_b is the mass of a blade and
     d is the diameter.

   1/2 of the total propeller weight is assumed to be in the blades.
 </documentation>

 <ixx unit="SLUG*FT2">230.52474</ixx>
 <diameter unit="IN">153.0 </diameter>
 <numblades> 3 </numblades>
 <gearratio>2.0 </gearratio>
 <minpitch> 0.0 </minpitch>
 <maxpitch> 1.0 </maxpitch>

 <table name="C_THRUST" type="internal">
  <tableData>
            -0.6       1.0
   0.00000   0.07923   0.08575
   0.05000   0.08242   0.08984
   0.10000   0.07439   0.09393
   0.15000   0.05992   0.09320
   0.20000   0.08009   0.09246
   0.25000   0.07899   0.09133
   0.30000   0.07737   0.09019
   0.35000   0.07566   0.08861
   0.40000   0.07339   0.08702
   0.45000   0.07053   0.08550
   0.50000   0.06720   0.08397
   0.55000   0.06323   0.08274
   0.60000   0.05827   0.08150
   0.65000   0.05227   0.08098
   0.70000   0.04530   0.08046
   0.75000   0.03741   0.07890
   0.80000   0.02925   0.07734
   0.85000   0.02089   0.07407
   0.90000   0.01238   0.07080
   0.95000   0.00369   0.06470
   1.00000  -0.00511   0.05861
   1.05000  -0.01397   0.05092
   1.10000  -0.02283   0.04323
   1.15000  -0.03169   0.03534
   1.20000  -0.04055   0.02745
   1.25000  -0.04941   0.01940
   1.30000  -0.05827   0.01125
   1.35000  -0.06713   0.00295
   1.40000  -0.07599  -0.00550
   1.45000  -0.08485  -0.01397
   1.50000  -0.09371  -0.02244
  </tableData>
 </table>

 <table name="C_POWER" type="internal">
  <tableData>
            -0.6       1.0
   0.00000   0.05352   0.08989
   0.05000   0.05837   0.09318
   0.10000   0.05159   0.09648
   0.15000   0.03775   0.09568
   0.20000   0.05506   0.09488
   0.25000   0.05369   0.09387
   0.30000   0.05257   0.09286
   0.35000   0.05178   0.09165
   0.40000   0.05109   0.09044
   0.45000   0.05027   0.08953
   0.50000   0.04932   0.08863
   0.55000   0.04796   0.08805
   0.60000   0.04593   0.08746
   0.65000   0.04301   0.08552
   0.70000   0.03908   0.08359
   0.75000   0.03405   0.08257
   0.80000   0.02831   0.08156
   0.85000   0.02196   0.07990
   0.90000   0.01500   0.07824
   0.95000   0.00732   0.07372
   1.00000  -0.00104   0.06920
   1.05000   0.01000   0.06213
   1.10000   0.01000   0.05505
   1.15000   0.01000   0.04669
   1.20000   0.01000   0.03832
   1.25000   0.01000   0.02897
   1.30000   0.01000   0.01904
   1.35000   0.01000   0.00839
   1.40000   0.01000   0.01000
   1.45000   0.01000   0.01000
   1.50000   0.01000   0.01000
  </tableData>
 </table>

</propeller>
